freq[0] := 12  # Гц
amp[0] := 21
NS := 100000
NF := 11
freq[1] := 345  # Гц
amp[1] := 19
dfreq := 200000
freq[2] := 678  # Гц
amp[2] := 17
dtime := 1/dfreq = 5e-6
freq[3] := 1234  # Гц
amp[3] := 15
dn := dfreq/NS = 2
freq[4] := 5678  # Гц
amp[4] := 13
i := 0, 1 .. NS
freq[5] := 12345  # Гц
amp[5] := 11
ns[i] := 1 + i
freq[6] := 22222  # Гц
amp[6] := 9
time[i] := ns[i]*dtime
freq[7] := 35678  # Гц
amp[7] := 7
freq[8] := 54321  # Гц
amp[8] := 5
freq[9] := 76543  # Гц
amp[9] := 3
freq[10] := 98765  # Гц
amp[10] := 1
f(x) := sum(amp[i]*(cos(2*π*freq[i]*x) + 1), i = 0 .. NF - 1)
s[i] := f(time[i])
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sc := ceil(s)
sum(ceil(s[i]), i = 0 .. NS)/NS = 121.502
logFreq(amp) :=
    for iii ∈ 0, 1 .. NF - 1
        v[iii] ← 0 if amp[iii] == 0
        v[iii] ← 1 otherwise
    return v
S(freq) :=
    k ← freq/dn
    alpha ← 2*cos(2*π*k/NS)
    Wre ← cos(2*π*k/NS)
    Wim ← sin(2*π*k/NS)
    vm1 ← 0
    vm2 ← 0
    for iii ∈ 0, 1 .. NS - 1
        scp[iii] ← sc[iii]*13/256
        v[iii] ← scp[iii] + alpha*vm1 - vm2 if iii == 0
        v[iii] ← scp[iii] + alpha*v[iii - 1] - vm1 if iii == 1
        v[iii] ← scp[iii] + alpha*v[iii - 1] - v[iii - 2] otherwise
        iii ← iii + 1
    vWre ← v[NS - 1]*Wre - v[NS - 2]
    vWim ← v[NS - 1]*Wim
    S ← (vWre^2 + vWim^2)*(39.3939/NS)^2
    M[0] ← S
    M[1] ← v
    M[2] ← Wre
    M[3] ← Wim
    M[4] ← vWre
    M[5] ← vWim
    M[6] ← alpha
    return M
S(freq[8])[1] =  # no stored result
S(freq[8])[6] = -0.270663
# [component: outputs vdata]
i := 0, 1 .. NF - 1
S[i] := S(freq[i])[0]
lF := logFreq(amp)
vdata = [446; 361; 289; 225; 169; 120; 80; 49; 24; 8; 0]
amp = [21; 19; 17; 15; 13; 11; 9; 7; 5; 3; 1]
round(sqrt(S), 1) = [21; 19; 17; 15; 13; 11; 9; 7; 5; 3; 1]
cos(2*π*50000/2/NS) = 6.12303e-17
sin(2*π*50000/2/NS) = 1
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sc =  # no stored result
freq = [12; 345; 678; 1234; 5678; 12345; 22222; 35678; 54321; 76543; 98765]
lF = [1; 1; 1; 1; 1; 1; 1; 1; 1; 1; 1]
round(S, 0) = [441; 361; 289; 225; 169; 121; 81; 49; 25; 9; 1]
# D:\Desktop\Study_now\SRW\GoertzelAlgorithm\src\sim\data\sample.csv
# D:\Desktop\Study_now\SRW\GoertzelAlgorithm\src\sim\data\freq.csv
# D:\Desktop\Study_now\SRW\GoertzelAlgorithm\src\sim\data\logic.csv
# D:\Desktop\Study_now\SRW\GoertzelAlgorithm\src\sim\data\data.csv
i := 0, 1 .. NS
S1 := CFFT(sc)
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